OpenVSP model (file version 5), 11 components.
Geometry view with OpenVSP parameter names; values to 6 digits, angles in degrees, lengths in the model's unit.
Overall bounding box: X_Min=0 X_Len=7 Y_Min=-6.03193 Y_Len=12.0639 Z_Min=-1.22663 Z_Len=2.3669

Fuselage "FuselageGeom"
  location (X Y Z) 0 0 0, rotation 90 0 0
  bounding box size 7 1.15 1.16728
  Design: Length=7
  cross sections:
    n  XLocPercent  YLocPercent  ZLocPercent  shape
    0  0            0            0            circle Circle_Diameter=0.1
    1  0.25675      0.0203252    0            circle Circle_Diameter=1.15
    2  0.476558     0            0            circle Circle_Diameter=0.9
    3  0.591929     0            0            as above
    4  1            0.0243902    0            circle Circle_Diameter=0.5

Wing "WingGeom"
  location (X Y Z) 3.34 0 0, rotation 0 0 0
  symmetric about XZ
  bounding box size 0.967 12.0639 0.636456
  totals: TotalSpan=12.38 TotalProjectedSpan=12.0639 TotalChord=0.68025 TotalArea=10.0063 TotalAR=14.5446 MAC=0.82148
  root: chord 0.967, twist 0, NACA 4-series Camber=0 CamberLoc=0.2 ThickChord=0.1
  sections:
    n  Span  Root_Chord  Tip_Chord  Area     Sweep  Sweep_Location  Dihedral  Twist  Twist_Location  tip airfoil
    1  5.89  0.967       0.677      4.84158  0      0.5             3         0      0.25            as above
    2  0.3   0.677       0.4        0.16155  0      0.5             60        0      0.25            as above

Wing "WingGeom"
  location (X Y Z) 5.79 0 0, rotation 0 0 0
  symmetric about XZ
  bounding box size 0.82 3.07648 1.1813
  totals: TotalSpan=3.81 TotalProjectedSpan=3.07648 TotalChord=0.575 TotalArea=2.19075 TotalAR=4.32032 MAC=0.609797
  root: chord 0.82, twist 0, NACA 4-series Camber=0 CamberLoc=0.2 ThickChord=0.1
  sections:
    n  Span   Root_Chord  Tip_Chord  Area     Sweep  Sweep_Location  Dihedral  Twist  Twist_Location  tip airfoil
    1  1.905  0.82        0.33       1.09537  0      0.5             36.15     0      0               as above

Custom "MotorBox"
  location (X Y Z) 3.36957 0 0, rotation 0 0 0
  bounding box size 0.78 0.69 0.4
  mass: Density=1 Shell_Flag=0 Mass_Area=1 Mass_Prior=0 PointMass=82 CGx=0 CGy=0 CGz=0 Ixx=0 Iyy=0 Izz=0 Ixy=0 Ixz=0 Iyz=0
  Design: Height=0.4 Length=0.78 SquareFlag=0 Width=0.69
  custom script Box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

Custom "CP_box"
  location (X Y Z) 2.71739 -0.162162 0, rotation 0 0 90
  bounding box size 0.72 0.37 0.7
  mass: Density=1 Shell_Flag=0 Mass_Area=1 Mass_Prior=0 PointMass=150 CGx=0 CGy=0 CGz=0 Ixx=0 Iyy=0 Izz=0 Ixy=0 Ixz=0 Iyz=0
  Design: Height=0.7 Length=0.37 SquareFlag=0 Width=0.72
  custom script Box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

Custom "Camera_box"
  location (X Y Z) 0.434783 0 -0.326087, rotation 0 0 0
  bounding box size 0.3 0.3 0.3
  mass: Density=1 Shell_Flag=0 Mass_Area=1 Mass_Prior=0 PointMass=5 CGx=0 CGy=0 CGz=0 Ixx=0 Iyy=0 Izz=0 Ixy=0 Ixz=0 Iyz=0
  Design: Height=0.3 Length=0.3 SquareFlag=1 Width=0.3
  custom script Box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

Mesh "MeshGeom"
  location (X Y Z) 0 0 0, rotation 0 0 0

Gear "MainGears"
  location (X Y Z) 4.2 0.940171 -1.18, rotation 0 0 0
  symmetric about XZ
  bounding box size 0.55 2.06637 0.55
  bogie "New Gear": NumAcross=1 NumTandem=1 Spacing=0.1496 Pitch=0.605 Symmetrical=0 XContactPt=0 YContactPt=0 TravelCompressed=1 TravelExtended=1 SteeringAngle=0 DiameterModel=0.55 WidthModel=0.136 PlyRating=10

Blank "CG_peso_combustivel"
  location (X Y Z) 3.7 0 0, rotation 0 0 0
  mass: Density=1 Shell_Flag=0 Mass_Area=1 Mass_Prior=0 PointMass=133 CGx=0 CGy=0 CGz=0 Ixx=0 Iyy=0 Izz=0 Ixy=0 Ixz=0 Iyz=0

Gear "GearDianteiro"
  location (X Y Z) 2 0 -1.18, rotation 0 0 0
  bounding box size 0.41 0.255515 0.41
  bogie "New Gear": NumAcross=1 NumTandem=1 Spacing=0.22 Pitch=0.451 Symmetrical=0 XContactPt=0 YContactPt=0 TravelCompressed=1 TravelExtended=1 SteeringAngle=0 DiameterModel=0.41 WidthModel=0.2 PlyRating=20

Blank "Measure"
  location (X Y Z) 7 0 -0.08, rotation 0 0 0
